units		electron
atom_style	full

pair_style      lj/cut/tip4p/cut 1 2 1 1 0.278072379 17.001
# high-pppm precision and shift to get meaningful fd estimates
# kspace_style	none
# kspace_style	pppm/tip4p 1e-5
pair_modify     shift yes
bond_style      class2
angle_style     harmonic


read_data	water_1_data.lmp
pair_coeff  * * 0 0
pair_coeff  1  1  0.000295147 5.96946

neighbor	2.0 bin


timestep	0.00025

#velocity all create 298.0 2345187

#thermo_style	multi
#thermo		1

#fix		1 all nvt temp 298.0 298.0 30.0 tchain 1
#fix 1 all nve
fix 1 all ipi h2o-lammps 32342 unix


#dump		1 all xyz 25 dump.xyz

run		100000000
